# OpenSim document version 40000
Model DSEM-OpenLoop:
  gravity: 0 -9.81 0
  length_units: meters
  force_units: N
  Ground
  BodySet:
    Body thorax: mass=20 [kg] mass_center=(-0.0591 -0.1486 0) inertia=(1.2981 0.55245 1.1281 0 0 0)
      WrapEllipsoid serratus_anterior: translation=(-0.0591 -0.1486 0) quadrant=all dimensions=(0.0944 0.2079 0.147)
    Body clavicle: mass=0.156 mass_center=(-0.0008808371 -0.005339956 0.07473767) inertia=(0.001 0.001 0.003 0 0 0)
    Body scapula: mass=0.704 mass_center=(0.02474335 -0.02287396 -0.05301357) inertia=(0.007 0.007 0.007 0 0 0)
    Body humerus: mass=2.052 mass_center=(0.003622808 -0.07755037 0.006440892) inertia=(1.32 0.199 1.32 0 0 0)
      WrapSphere deltoid: translation=(0.001811721 -0.0009442306 0.002237431) quadrant=all radius=0.0272
      WrapSphere humeral_head: translation=(0.001267308 0.001840329 -0.001702092) quadrant=all radius=0.0231
      WrapCylinder humerus: xyz_body_rotation=(-1.564693 0.004335319 0.004308941)
          translation=(0.004215248 -0.07296773 0.005673823) quadrant=x radius=0.01 length=0.1
    Body ulna: mass=0.5464 mass_center=(-0.01586136 0.1946836 -0.007104505)
        inertia=(0.0030585 0.00045325 0.0030585 0 0 0)
      WrapCylinder triceps: xyz_body_rotation=(-0.2155622 -0.005378335 -0.0005819395)
          translation=(-0.005665973 0.2561977 0.005133562) quadrant=-x radius=0.019 length=0.1
      WrapCylinder brachialis: xyz_body_rotation=(2.92603 0.005378335 -0.04969705)
          translation=(-0.005665973 0.2561977 0.005133562) quadrant=x radius=0.015 length=0.1
      WrapCylinder pronator_quadratus: xyz_body_rotation=(1.60651 0.05505869 -0.05705994)
          translation=(0.004537844 0.03909384 -0.001126611) quadrant=-y radius=0.007 length=0.1
    Body radius: mass=0.5464 mass_center=(-0.007422616 0.1200718 0.00106459)
        inertia=(0.0030585 0.00045325 0.0030585 0 0 0)
      WrapCylinder biceps_brachii: xyz_body_rotation=(1.516221 0.1616542 -0.1530986)
          translation=(-0.005491991 0.2067546 -0.004950108) quadrant=-y radius=0.0092 length=0.1
      WrapCylinder supinator: xyz_body_rotation=(1.723362 0.04152723 -0.04839803)
          translation=(-0.001265814 0.1202265 0.008301292) quadrant=y radius=0.009 length=0.2
      WrapCylinder pronator_teres: xyz_body_rotation=(-1.679363 -0.1477611 -0.1646688)
          translation=(0.002155147 0.1493701 -0.007468433) quadrant=-x radius=0.0071 length=0.1
    Body hand: mass=0.525 mass_center=(0 0 0) inertia=(0.064 0.019 0.064 0 0 0)
  JointSet:
    FreeJoint moving_base: socket_parent_frame=ground_offset socket_child_frame=thorax_offset
      Coordinate thorax_rx: range=(-3.141593 3.141593)
      Coordinate thorax_ry: range=(-3.141593 3.141593)
      Coordinate thorax_rz: range=(-3.141593 3.141593)
      Coordinate thorax_tx: range=(-5 5)
      Coordinate thorax_ty: range=(-5 5)
      Coordinate thorax_tz: range=(-5 5)
      PhysicalOffsetFrame ground_offset: socket_parent=/ground translation=(0 0 0) [meters]
      PhysicalOffsetFrame thorax_offset: socket_parent=/bodyset/thorax translation=(0 0 0)
    BallJoint sternoclavicular_joint: socket_parent_frame=thorax_offset socket_child_frame=clavicle_offset
      Coordinate clav_depr: range=(-0.7853982 0.7853982)
      Coordinate clav_prot: range=(-0.7853982 0.7853982)
      Coordinate clav_ax_rot: range=(-0.7853982 0.7853982)
      PhysicalOffsetFrame thorax_offset: socket_parent=/bodyset/thorax translation=(-0.0028 -0.0152 0.0014)
          orientation=(-0.1184254 -0.3777349 -0.04385437) [radians]
      PhysicalOffsetFrame clavicle_offset: socket_parent=/bodyset/clavicle
          translation=(0.003331432 -0.02204142 -0.02360143)
    BallJoint acromioclavicular_joint: socket_parent_frame=clavicle_offset socket_child_frame=scapula_offset
      Coordinate scap_med_rot: range=(-0.7853982 0.7853982)
      Coordinate scap_prot: range=(-0.7853982 0.7853982)
      Coordinate scap_ant_tilt: range=(-0.7853982 0.7853982)
      PhysicalOffsetFrame clavicle_offset: socket_parent=/bodyset/clavicle
          translation=(0.003060002 -0.01345134 0.1672742) orientation=(-0.1221007 0.8046249 0.0670744)
      PhysicalOffsetFrame scapula_offset: socket_parent=/bodyset/scapula translation=(0.03126534 0.008597659 0.00933)
    CustomJoint glenohumeral_joint: socket_parent_frame=scapula_offset socket_child_frame=humerus_offset
      Coordinate hum_elev_plane: default_value=0 range=(-3.141593 3.141593) clamped=true
      Coordinate hum_elev: default_value=0 range=(-3.141593 3.141593) clamped=true
      Coordinate hum_int_rot: default_value=0 range=(-3.141593 3.141593) clamped=true
      PhysicalOffsetFrame scapula_offset: socket_parent=/bodyset/scapula
          translation=(0.04388284 -0.02303264 0.001983381) orientation=(0.1452331 0.09574549 0.005372695)
      PhysicalOffsetFrame humerus_offset: socket_parent=/bodyset/humerus translation=(0 0 0)
      SpatialTransform: axes_held_at_zero=(translation1 translation2 translation3)
        TransformAxis rotation1: coordinates=hum_elev_plane axis=(0 1 0) LinearFunction(coefficients=1 0)
        TransformAxis rotation2: coordinates=hum_elev axis=(-1 0 0) LinearFunction(coefficients=1 0)
        TransformAxis rotation3: coordinates=hum_int_rot axis=(0.004385513 0.999973 -0.00589008)
            LinearFunction(coefficients=1 0)
    CustomJoint humeroulnar_joint: socket_parent_frame=humerus_offset socket_child_frame=ulna_offset
      Coordinate elbow_flexion: default_value=0 range=(-0.1745329 2.617994) clamped=true
      PhysicalOffsetFrame humerus_offset: socket_parent=/bodyset/humerus
          translation=(-0.004909959 -0.2906502 0.005807858) orientation=(-0.197294 -0.0265934 0.2210876)
      PhysicalOffsetFrame ulna_offset: socket_parent=/bodyset/ulna translation=(-0.005665973 0.2561977 0.005133562)
      SpatialTransform: axes_held_at_zero=(rotation1 rotation2 translation1 translation2 translation3)
        TransformAxis rotation3: coordinates=elbow_flexion axis=(0.004689927 -0.1865169 0.9768422)
            LinearFunction(coefficients=1 0)
    CustomJoint radioulnar_joint: socket_parent_frame=ulna_offset socket_child_frame=radius_offset
      Coordinate pronation: default_value=0 range=(-1.570796 1.570796) clamped=true
      PhysicalOffsetFrame ulna_offset: socket_parent=/bodyset/ulna translation=(0.007009353 0.2365479 0.01883788)
          orientation=(0.6807888 -1.15844 0.511031)
      PhysicalOffsetFrame radius_offset: socket_parent=/bodyset/radius
          translation=(-0.009130879 0.2389328 -0.006299363)
      SpatialTransform: axes_held_at_zero=(rotation1 rotation3 translation1 translation2 translation3)
        TransformAxis rotation2: coordinates=pronation axis=(-0.03849352 0.9665088 -0.2538663)
            LinearFunction(coefficients=1 0)
    WeldJoint radiocarpal_joint: socket_parent_frame=radius_offset socket_child_frame=hand_offset
      PhysicalOffsetFrame radius_offset: socket_parent=/bodyset/radius translation=(3.14905e-5 0.004748074 0.02700009)
          orientation=(3.0952 -0.0008681352 3.134828)
      PhysicalOffsetFrame hand_offset: socket_parent=/bodyset/hand translation=(-3.149937e-5 0.09759066 -3.834449e-5)
  ForceSet:
    Millard2012EquilibriumMuscle [values shared by the 140 below unless stated]: min_control=0.01 max_control=1
        pennation_angle_at_optimal=0 [radians] minimum_activation=0.01
      ActiveForceLengthCurve: minimum_value=0
      ForceVelocityCurve: concentric_slope_at_vmax=0 concentric_slope_near_vmax=0.25 isometric_slope=5
          eccentric_slope_at_vmax=0 eccentric_slope_near_vmax=0.15 max_eccentric_velocity_force_multiplier=1.4
      FiberForceLengthCurve
      TendonForceLengthCurve
    Millard2012EquilibriumMuscle TrapScap1: max_isometric_force=118 optimal_fiber_length=0.1446
        tendon_slack_length=0.003
      PathPoint Origin: thorax (-0.1141 0.0534 -0.0081)
      PathPoint Insertion: scapula (0.01451928 0.01732896 -0.01482086)
    Millard2012EquilibriumMuscle TrapScap2: max_isometric_force=168 optimal_fiber_length=0.1127
        tendon_slack_length=0.027
      PathPoint Origin: thorax (-0.1153 0.0505 -0.008)
      PathPoint Insertion: scapula (0.002840422 0.01574858 -0.03311229)
    Millard2012EquilibriumMuscle TrapScap3: max_isometric_force=199 optimal_fiber_length=0.107
        tendon_slack_length=0.054
      PathPoint Origin: thorax (-0.1178 0.0425 -0.0043)
      PathPoint Insertion: scapula (0.001125157 0.01287182 -0.05597169)
    Millard2012EquilibriumMuscle TrapScap4: max_isometric_force=138 optimal_fiber_length=0.0952
        tendon_slack_length=0.053
      PathPoint Origin: thorax (-0.1214 0.0372 -0.0037)
      PathPoint Insertion: scapula (0.0009449527 0.01189823 -0.06889724)
    Millard2012EquilibriumMuscle TrapScap5: max_isometric_force=122 optimal_fiber_length=0.0924
        tendon_slack_length=0.035
      PathPoint Origin: thorax (-0.125 0.0261 -0.0031)
      PathPoint Insertion: scapula (0.006739496 0.01365426 -0.07606938)
    Millard2012EquilibriumMuscle TrapScap6: max_isometric_force=101 optimal_fiber_length=0.0893
        tendon_slack_length=0.033
      PathPoint Origin: thorax (-0.1363 -0.0002 -0.0043)
      PathPoint Insertion: scapula (-0.002771169 0.007232702 -0.0682093)
    Millard2012EquilibriumMuscle TrapScap7: max_isometric_force=97 optimal_fiber_length=0.0868
        tendon_slack_length=0.036
      PathPoint Origin: thorax (-0.1469 -0.0339 -0.0016)
      PathPoint Insertion: scapula (0.006739496 0.01365426 -0.07606938)
    Millard2012EquilibriumMuscle TrapScap8: max_isometric_force=138 optimal_fiber_length=0.077
        tendon_slack_length=0.048
      PathPoint Origin: thorax (-0.1511 -0.0629 0.0037)
      PathPoint Insertion: scapula (-0.0009070491 0.008762956 -0.07520597)
    Millard2012EquilibriumMuscle TrapScap9: max_isometric_force=123 optimal_fiber_length=0.1011
        tendon_slack_length=0.034
      PathPoint Origin: thorax (-0.1522 -0.1109 0.0066)
      PathPoint Insertion: scapula (0.006107519 0.01026573 -0.09384404)
    Millard2012EquilibriumMuscle TrapScap10: max_isometric_force=81 optimal_fiber_length=0.1264
        tendon_slack_length=0.035
      PathPoint Origin: thorax (-0.154 -0.1479 0.0102)
      PathPoint Insertion: scapula (0.001739945 0.004665107 -0.08906205)
    Millard2012EquilibriumMuscle TrapScap11: max_isometric_force=92 optimal_fiber_length=0.1355
        tendon_slack_length=0.031
      PathPoint Origin: thorax (-0.1477 -0.1794 0.0135)
      PathPoint Insertion: scapula (-0.0005359602 0.003489438 -0.08262637)
    Millard2012EquilibriumMuscle TrapClav1: max_isometric_force=97 optimal_fiber_length=0.1547
        tendon_slack_length=0.047
      PathPoint Origin: thorax (-0.1124 0.1294 -0.0097)
      PathPoint Insertion: clavicle (-0.008747827 0.004847836 0.1100122)
    Millard2012EquilibriumMuscle TrapClav2: max_isometric_force=47 optimal_fiber_length=0.168 tendon_slack_length=0.042
      PathPoint Origin: thorax (-0.1066 0.0717 -0.0106)
      PathPoint Insertion: clavicle (-0.00881297 0.002830277 0.1364679)
    Millard2012EquilibriumMuscle LevScap1: max_isometric_force=96 optimal_fiber_length=0.1578 tendon_slack_length=0.019
      PathPoint Origin: thorax (-0.0572 0.1479 0.0388)
      PathPoint Insertion: scapula (0.01346701 0.01242108 -0.1156562)
    Millard2012EquilibriumMuscle LevScap2: max_isometric_force=96 optimal_fiber_length=0.1578 tendon_slack_length=0.019
      PathPoint Origin: thorax (-0.0607 0.1254 0.0291)
      PathPoint Insertion: scapula (0.01346701 0.01242108 -0.1156562)
    Millard2012EquilibriumMuscle PectMin1: max_isometric_force=47 optimal_fiber_length=0.0765 tendon_slack_length=0.051
      PathPoint Origin: thorax (0.018 -0.0606 0.0513)
      PathPoint Insertion: scapula (0.08001358 0.002633679 -0.02865434)
    Millard2012EquilibriumMuscle PectMin2: max_isometric_force=107 optimal_fiber_length=0.1086
        tendon_slack_length=0.041
      PathPoint Origin: thorax (0.0267 -0.0933 0.0585)
      PathPoint Insertion: scapula (0.08001358 0.002633679 -0.02865434)
    Millard2012EquilibriumMuscle PectMin3: max_isometric_force=107 optimal_fiber_length=0.1075
        tendon_slack_length=0.029
      PathPoint Origin: thorax (0.0203 -0.0947 0.0965)
      PathPoint Insertion: scapula (0.0827486 -0.003474974 -0.02443367)
    Millard2012EquilibriumMuscle PectMin4: max_isometric_force=46 optimal_fiber_length=0.1381 tendon_slack_length=0.026
      PathPoint Origin: thorax (0.0243 -0.1138 0.0886)
      PathPoint Insertion: scapula (0.08395431 -0.01162614 -0.01988233)
    Millard2012EquilibriumMuscle Rhomb1: max_isometric_force=51 optimal_fiber_length=0.0986 tendon_slack_length=0.015
      PathPoint Origin: thorax (-0.108 0.0627 -0.0091)
      PathPoint Insertion: scapula (0.01182217 -0.004213682 -0.1170843)
    Millard2012EquilibriumMuscle Rhomb2: max_isometric_force=92 optimal_fiber_length=0.1077 tendon_slack_length=0.066
      PathPoint Origin: thorax (-0.1151 0.0506 -0.0076)
      PathPoint Insertion: scapula (0.005813531 -0.07523957 -0.1261584)
    Millard2012EquilibriumMuscle Rhomb3: max_isometric_force=142 optimal_fiber_length=0.1259 tendon_slack_length=0.032
      PathPoint Origin: thorax (-0.1252 0.0317 0.0054)
      PathPoint Insertion: scapula (0.00522443 -0.08059107 -0.1274329)
    Millard2012EquilibriumMuscle Rhomb4: max_isometric_force=82 optimal_fiber_length=0.1267 tendon_slack_length=0.031
      PathPoint Origin: thorax (-0.1348 0.0068 -0.0028)
      PathPoint Insertion: scapula (0.005034411 -0.09269146 -0.1270271)
    Millard2012EquilibriumMuscle Rhomb5: max_isometric_force=67 optimal_fiber_length=0.117 tendon_slack_length=0.04
      PathPoint Origin: thorax (-0.1449 -0.02 0.0005)
      PathPoint Insertion: scapula (0.007165941 -0.1044617 -0.125942)
    Millard2012EquilibriumMuscle SerrAnt1: max_isometric_force=61 optimal_fiber_length=0.1635 tendon_slack_length=0.025
      PathPoint Origin: scapula (0.004023918 -0.1102935 -0.1252362)
      PathPoint Insertion: thorax (-0.0353 -0.2098 0.138)
      PathWrap: wrap_object=serratus_anterior method=hybrid
    Millard2012EquilibriumMuscle SerrAnt2: max_isometric_force=110 optimal_fiber_length=0.1667
        tendon_slack_length=0.009
      PathPoint Origin: scapula (0.007593532 -0.1099541 -0.1232033)
      PathPoint Insertion: thorax (-0.0149 -0.1884 0.1327)
      PathWrap: wrap_object=serratus_anterior method=hybrid
    Millard2012EquilibriumMuscle SerrAnt3: max_isometric_force=105 optimal_fiber_length=0.1622
        tendon_slack_length=0.007
      PathPoint Origin: scapula (0.01107198 -0.110665 -0.118523)
      PathPoint Insertion: thorax (-0.0024 -0.159 0.1242)
      PathWrap: wrap_object=serratus_anterior method=hybrid
    Millard2012EquilibriumMuscle SerrAnt4: max_isometric_force=110 optimal_fiber_length=0.1289 tendon_slack_length=0
      PathPoint Origin: scapula (0.01242525 -0.1054967 -0.1162674)
      PathPoint Insertion: thorax (0.0031 -0.1221 0.1231)
      PathWrap: wrap_object=serratus_anterior method=hybrid
    Millard2012EquilibriumMuscle SerrAnt5: max_isometric_force=64 optimal_fiber_length=0.1259 tendon_slack_length=0.011
      PathPoint Origin: scapula (0.01295194 -0.09967937 -0.1172731)
      PathPoint Insertion: thorax (-0.0041 -0.0859 0.1194)
      PathWrap: wrap_object=serratus_anterior method=hybrid
    Millard2012EquilibriumMuscle SerrAnt6: max_isometric_force=97 optimal_fiber_length=0.122 tendon_slack_length=0
      PathPoint Origin: scapula (0.01057435 -0.09568809 -0.1145024)
      PathPoint Insertion: thorax (-0.0199 -0.0428 0.1124)
      PathWrap: wrap_object=serratus_anterior method=hybrid
    Millard2012EquilibriumMuscle SerrAnt7: max_isometric_force=47 optimal_fiber_length=0.1133 tendon_slack_length=0.009
      PathPoint Origin: scapula (0.009309657 -0.05008494 -0.1189749)
      PathPoint Insertion: thorax (-0.0329 -0.0077 0.1001)
      PathWrap: wrap_object=serratus_anterior method=hybrid
    Millard2012EquilibriumMuscle SerrAnt8: max_isometric_force=76 optimal_fiber_length=0.0845 tendon_slack_length=0.011
      PathPoint Origin: scapula (0.01034746 -0.02061868 -0.1179394)
      PathPoint Insertion: thorax (-0.0552 0.0023 0.101)
      PathWrap: wrap_object=serratus_anterior method=hybrid
    Millard2012EquilibriumMuscle SerrAnt9: max_isometric_force=79 optimal_fiber_length=0.08 tendon_slack_length=0.007
      PathPoint Origin: scapula (0.01737065 0.01015261 -0.1149108)
      PathPoint Insertion: thorax (-0.0546 0.0062 0.098)
      PathWrap: wrap_object=serratus_anterior method=hybrid
    Millard2012EquilibriumMuscle SerrAnt10: max_isometric_force=63 optimal_fiber_length=0.066 tendon_slack_length=0.005
      PathPoint Origin: scapula (0.02601624 0.02180722 -0.1066353)
      PathPoint Insertion: thorax (-0.0595 0.0109 0.0944)
      PathWrap: wrap_object=serratus_anterior method=hybrid
    Millard2012EquilibriumMuscle SerrAnt11: max_isometric_force=23 optimal_fiber_length=0.0885 tendon_slack_length=0
      PathPoint Origin: scapula (0.03224602 0.02543702 -0.1012488)
      PathPoint Insertion: thorax (-0.0546 0.0062 0.098)
      PathWrap: wrap_object=serratus_anterior method=hybrid
    Millard2012EquilibriumMuscle SerrAnt12: max_isometric_force=112 optimal_fiber_length=0.0945 tendon_slack_length=0
      PathPoint Origin: scapula (0.04441498 0.0311731 -0.08880117)
      PathPoint Insertion: thorax (-0.047 0.0009 0.1005)
      PathWrap: wrap_object=serratus_anterior method=hybrid
    Millard2012EquilibriumMuscle DeltScap1: max_isometric_force=289 optimal_fiber_length=0.1128
        tendon_slack_length=0.08 pennation_angle_at_optimal=0.08726646
      PathPoint Origin: scapula (0.000862637 -0.0008234333 -0.08277824)
      PathPoint Insertion: humerus (-0.009186951 -0.1112771 0.01347213)
      PathWrap: wrap_object=deltoid method=hybrid
    Millard2012EquilibriumMuscle DeltScap2: max_isometric_force=211 optimal_fiber_length=0.0949
        tendon_slack_length=0.076 pennation_angle_at_optimal=0.08726646
      PathPoint Origin: scapula (-0.001126517 0.006273386 -0.04998665)
      PathPoint Insertion: humerus (-0.005281114 -0.09644665 0.01555357)
      PathWrap: wrap_object=deltoid method=hybrid
    Millard2012EquilibriumMuscle DeltScap3: max_isometric_force=446 optimal_fiber_length=0.0833
        tendon_slack_length=0.062 pennation_angle_at_optimal=0.08726646
      PathPoint Origin: scapula (0.001409911 0.005737633 -0.01437852)
      PathPoint Insertion: humerus (-0.005281114 -0.09644665 0.01555357)
      PathWrap: wrap_object=deltoid method=hybrid
    Millard2012EquilibriumMuscle DeltScap4: max_isometric_force=117 optimal_fiber_length=0.0666
        tendon_slack_length=0.045 pennation_angle_at_optimal=0.08726646
      PathPoint Origin: scapula (0.004812113 -0.004519914 -0.003002323)
      PathPoint Insertion: humerus (-0.004035008 -0.08467368 0.01570946)
      PathWrap: wrap_object=deltoid method=hybrid
    Millard2012EquilibriumMuscle DeltScap5: max_isometric_force=120 optimal_fiber_length=0.0656
        tendon_slack_length=0.035 pennation_angle_at_optimal=0.08726646
      PathPoint Origin: scapula (0.01734233 0.0007796672 0.01298636)
      PathPoint Insertion: humerus (-0.0006568481 -0.07782459 0.01677624)
      PathWrap: wrap_object=deltoid method=hybrid
    Millard2012EquilibriumMuscle DeltScap6: max_isometric_force=285 optimal_fiber_length=0.0767
        tendon_slack_length=0.067 pennation_angle_at_optimal=0.08726646
      PathPoint Origin: scapula (0.00501578 0.005320165 0.003620468)
      PathPoint Insertion: humerus (-0.006607092 -0.108937 0.01646018)
      PathWrap: wrap_object=deltoid method=hybrid
    Millard2012EquilibriumMuscle DeltScap7: max_isometric_force=149 optimal_fiber_length=0.0754
        tendon_slack_length=0.082 pennation_angle_at_optimal=0.08726646
      PathPoint Origin: scapula (0.009184522 0.00027029 0.008491849)
      PathPoint Insertion: humerus (-0.005159772 -0.131599 0.01578965)
      PathWrap: wrap_object=deltoid method=hybrid
    Millard2012EquilibriumMuscle DeltScap8: max_isometric_force=215 optimal_fiber_length=0.071
        tendon_slack_length=0.065 pennation_angle_at_optimal=0.08726646
      PathPoint Origin: scapula (0.01810368 0.00617098 0.01412395)
      PathPoint Insertion: humerus (-0.006607092 -0.108937 0.01646018)
      PathWrap: wrap_object=deltoid method=hybrid
    Millard2012EquilibriumMuscle DeltScap9: max_isometric_force=286 optimal_fiber_length=0.0732
        tendon_slack_length=0.071 pennation_angle_at_optimal=0.08726646
      PathPoint Origin: scapula (0.02413725 0.004800756 0.01569191)
      PathPoint Insertion: humerus (0.004936175 -0.1173816 0.0184684)
      PathWrap: wrap_object=deltoid method=hybrid
    Millard2012EquilibriumMuscle DeltScap10: max_isometric_force=445 optimal_fiber_length=0.0748
        tendon_slack_length=0.064 pennation_angle_at_optimal=0.08726646
      PathPoint Origin: scapula (0.03311117 0.005082184 0.01771417)
      PathPoint Insertion: humerus (0.006050187 -0.1059207 0.01830008)
      PathWrap: wrap_object=deltoid method=hybrid
    Millard2012EquilibriumMuscle DeltScap11: max_isometric_force=239 optimal_fiber_length=0.0737
        tendon_slack_length=0.048 pennation_angle_at_optimal=0.08726646
      PathPoint Origin: scapula (0.04508426 0.008236705 0.01521534)
      PathPoint Insertion: humerus (0.008626763 -0.09230928 0.01805619)
      PathWrap: wrap_object=deltoid method=hybrid
    Millard2012EquilibriumMuscle DeltClav1: max_isometric_force=128 optimal_fiber_length=0.0836
        tendon_slack_length=0.062 pennation_angle_at_optimal=0.08726646
      PathPoint Origin: clavicle (0.002053286 -0.001388383 0.1272996)
      PathPoint Insertion: humerus (0.008626763 -0.09230928 0.01805619)
      PathWrap: wrap_object=deltoid method=hybrid
    Millard2012EquilibriumMuscle DeltClav2: max_isometric_force=160 optimal_fiber_length=0.094
        tendon_slack_length=0.088 pennation_angle_at_optimal=0.08726646
      PathPoint Origin: clavicle (-0.001652719 0.003734432 0.10552)
      PathPoint Insertion: humerus (0.01159125 -0.1188314 0.01536389)
      PathWrap: wrap_object=deltoid method=hybrid
    Millard2012EquilibriumMuscle DeltClav3: max_isometric_force=105 optimal_fiber_length=0.0824
        tendon_slack_length=0.067 pennation_angle_at_optimal=0.08726646
      PathPoint Origin: clavicle (0.002597742 0.0002461349 0.1106848)
      PathPoint Insertion: humerus (0.009698389 -0.09943147 0.01673482)
      PathWrap: wrap_object=deltoid method=hybrid
    Millard2012EquilibriumMuscle DeltClav4: max_isometric_force=112 optimal_fiber_length=0.0991
        tendon_slack_length=0.073 pennation_angle_at_optimal=0.08726646
      PathPoint Origin: clavicle (0.002468349 -0.005633428 0.1083537)
      PathPoint Insertion: humerus (0.01159125 -0.1188314 0.01536389)
      PathWrap: wrap_object=deltoid method=hybrid
    Millard2012EquilibriumMuscle Coracobr1: max_isometric_force=201 optimal_fiber_length=0.066
        tendon_slack_length=0.092
      PathPoint Origin: scapula (0.07655486 -0.008596026 -0.008079088)
      PathPoint Insertion: humerus (0.007712672 -0.1463211 -0.002670057)
    Millard2012EquilibriumMuscle Coracobr2: max_isometric_force=148 optimal_fiber_length=0.0683
        tendon_slack_length=0.104
      PathPoint Origin: scapula (0.07857446 -0.01493968 -0.01351777)
      PathPoint Insertion: humerus (0.001756406 -0.1648477 -0.007636613)
    Millard2012EquilibriumMuscle Coracobr3: max_isometric_force=114 optimal_fiber_length=0.0727
        tendon_slack_length=0.113
      PathPoint Origin: scapula (0.08260017 -0.008193639 -0.009267521)
      PathPoint Insertion: humerus (0.005561597 -0.1739389 -0.005338482)
    Millard2012EquilibriumMuscle Infra1: max_isometric_force=272 optimal_fiber_length=0.0633 tendon_slack_length=0.038
      PathPoint Origin: scapula (0.01899562 -0.04182557 -0.0609338)
      PathPoint Insertion: humerus (-0.01257385 0.009819037 0.01994329)
      PathWrap: wrap_object=humeral_head method=hybrid
    Millard2012EquilibriumMuscle Infra2: max_isometric_force=275 optimal_fiber_length=0.0719 tendon_slack_length=0.107
      PathPoint Origin: scapula (-0.001150392 -0.09225705 -0.126063)
      PathPoint Insertion: humerus (-0.00691467 0.01599985 0.01834917)
      PathWrap: wrap_object=humeral_head method=hybrid
    Millard2012EquilibriumMuscle Infra3: max_isometric_force=194 optimal_fiber_length=0.0677 tendon_slack_length=0.084
      PathPoint Origin: scapula (-0.0005682927 -0.07257509 -0.1077038)
      PathPoint Insertion: humerus (-0.00691467 0.01599985 0.01834917)
      PathWrap: wrap_object=humeral_head method=hybrid
    Millard2012EquilibriumMuscle Infra4: max_isometric_force=207 optimal_fiber_length=0.0693 tendon_slack_length=0.071
      PathPoint Origin: scapula (0.00121634 -0.04945839 -0.1091086)
      PathPoint Insertion: humerus (-0.007041578 0.01911604 0.01604846)
      PathWrap: wrap_object=humeral_head method=hybrid
    Millard2012EquilibriumMuscle Infra5: max_isometric_force=302 optimal_fiber_length=0.0698 tendon_slack_length=0.05
      PathPoint Origin: scapula (0.01072109 -0.01707935 -0.1043897)
      PathPoint Insertion: humerus (-0.007041578 0.01911604 0.01604846)
      PathWrap: wrap_object=humeral_head method=hybrid
    Millard2012EquilibriumMuscle Infra6: max_isometric_force=182 optimal_fiber_length=0.0753 tendon_slack_length=0.035
      PathPoint Origin: scapula (-0.0004367045 -0.000376461 -0.08070414)
      PathPoint Insertion: humerus (-0.008357366 0.01274146 0.01917471)
      PathWrap: wrap_object=humeral_head method=hybrid
    Millard2012EquilibriumMuscle TerMin1: max_isometric_force=122 optimal_fiber_length=0.0501 tendon_slack_length=0.049
      PathPoint Origin: scapula (0.01405436 -0.06649727 -0.05569918)
      PathPoint Insertion: humerus (-0.008804308 -0.007032875 0.0257797)
    Millard2012EquilibriumMuscle TerMin2: max_isometric_force=195 optimal_fiber_length=0.055 tendon_slack_length=0.051
      PathPoint Origin: scapula (0.006468208 -0.06908453 -0.06584839)
      PathPoint Insertion: humerus (-0.008002547 -0.001243191 0.02808334)
    Millard2012EquilibriumMuscle TerMin3: max_isometric_force=180 optimal_fiber_length=0.0506 tendon_slack_length=0.018
      PathPoint Origin: scapula (0.01694877 -0.04207869 -0.03809335)
      PathPoint Insertion: humerus (-0.008804308 -0.007032875 0.0257797)
    Millard2012EquilibriumMuscle TerMaj1: max_isometric_force=165 optimal_fiber_length=0.1411 tendon_slack_length=0.006
      PathPoint Origin: scapula (0.01309696 -0.1049195 -0.08742862)
      PathPoint Insertion: humerus (0.009414937 -0.06556417 -0.006009091)
      PathWrap: wrap_object=humerus method=hybrid
    Millard2012EquilibriumMuscle TerMaj2: max_isometric_force=85 optimal_fiber_length=0.1595 tendon_slack_length=0.012
      PathPoint Origin: scapula (0.01045077 -0.1124772 -0.1027413)
      PathPoint Insertion: humerus (0.009460944 -0.08426534 -0.002858859)
      PathWrap: wrap_object=humerus method=hybrid
    Millard2012EquilibriumMuscle TerMaj3: max_isometric_force=200 optimal_fiber_length=0.1526 tendon_slack_length=0.015
      PathPoint Origin: scapula (-9.248195e-5 -0.09006841 -0.09123055)
      PathPoint Insertion: humerus (0.008992982 -0.07837725 -0.003803009)
      PathWrap: wrap_object=humerus method=hybrid
    Millard2012EquilibriumMuscle TerMaj4: max_isometric_force=158 optimal_fiber_length=0.1093 tendon_slack_length=0.034
      PathPoint Origin: scapula (0.01112432 -0.09548978 -0.07964598)
      PathPoint Insertion: humerus (0.01067187 -0.04976748 -0.006523741)
      PathWrap: wrap_object=humerus method=hybrid
    Millard2012EquilibriumMuscle Supra1: max_isometric_force=120 optimal_fiber_length=0.0541 tendon_slack_length=0.017
      PathPoint Origin: scapula (0.01859192 0.003242215 -0.06031599)
      PathPoint Insertion: humerus (-0.002668247 0.01256168 0.02319859)
      PathWrap: wrap_object=humeral_head method=hybrid
    Millard2012EquilibriumMuscle Supra2: max_isometric_force=113 optimal_fiber_length=0.0591 tendon_slack_length=0.025
      PathPoint Origin: scapula (0.006943274 0.01100628 -0.05963902)
      PathPoint Insertion: humerus (-0.002668247 0.01256168 0.02319859)
      PathWrap: wrap_object=humeral_head method=hybrid
    Millard2012EquilibriumMuscle Supra3: max_isometric_force=258 optimal_fiber_length=0.0564 tendon_slack_length=0.052
      PathPoint Origin: scapula (0.0250144 0.02103947 -0.0943884)
      PathPoint Insertion: humerus (0.01371781 0.01922961 0.01229282)
      PathWrap: wrap_object=humeral_head method=hybrid
    Millard2012EquilibriumMuscle Supra4: max_isometric_force=130 optimal_fiber_length=0.0554 tendon_slack_length=0.031
      PathPoint Origin: scapula (0.04032028 0.02119874 -0.07384638)
      PathPoint Insertion: humerus (0.01371781 0.01922961 0.01229282)
      PathWrap: wrap_object=humeral_head method=hybrid
    Millard2012EquilibriumMuscle Subscap1: max_isometric_force=44 optimal_fiber_length=0.0556 tendon_slack_length=0.028
      PathPoint Origin: scapula (0.0228574 -0.01316954 -0.06191286)
      PathPoint Insertion: humerus (0.01922764 0.01653771 -0.002936273)
      PathWrap: wrap_object=humeral_head method=hybrid
    Millard2012EquilibriumMuscle Subscap2: max_isometric_force=264 optimal_fiber_length=0.0676
        tendon_slack_length=0.059 pennation_angle_at_optimal=0.08726646
      PathPoint Origin: scapula (0.02804687 0.01197822 -0.08371377)
      PathPoint Insertion: humerus (0.01922764 0.01653771 -0.002936273)
      PathWrap: wrap_object=humeral_head method=hybrid
    Millard2012EquilibriumMuscle Subscap3: max_isometric_force=78 optimal_fiber_length=0.0649 tendon_slack_length=0.044
      PathPoint Origin: scapula (0.01421162 -0.01449499 -0.1049441)
      PathPoint Insertion: humerus (0.02164414 0.01293808 -0.0005169345)
      PathWrap: wrap_object=humeral_head method=hybrid
    Millard2012EquilibriumMuscle Subscap4: max_isometric_force=274 optimal_fiber_length=0.0744
        tendon_slack_length=0.055 pennation_angle_at_optimal=0.08726646
      PathPoint Origin: scapula (0.008001916 -0.04361072 -0.09383307)
      PathPoint Insertion: humerus (0.02487746 0.006412664 0.0003459422)
      PathWrap: wrap_object=humeral_head method=hybrid
    Millard2012EquilibriumMuscle Subscap5: max_isometric_force=114 optimal_fiber_length=0.0797
        tendon_slack_length=0.066
      PathPoint Origin: scapula (0.01224472 -0.05704669 -0.08743593)
      PathPoint Insertion: humerus (0.02458449 0.008570343 0.004340762)
      PathWrap: wrap_object=humeral_head method=hybrid
    Millard2012EquilibriumMuscle Subscap6: max_isometric_force=149 optimal_fiber_length=0.0762
        tendon_slack_length=0.077
      PathPoint Origin: scapula (0.003588266 -0.07907469 -0.1058254)
      PathPoint Insertion: humerus (0.02802944 0.002287151 0.00176903)
      PathWrap: wrap_object=humeral_head method=hybrid
    Millard2012EquilibriumMuscle Subscap7: max_isometric_force=162 optimal_fiber_length=0.082 tendon_slack_length=0.079
      PathPoint Origin: scapula (0.01007208 -0.09465537 -0.09986198)
      PathPoint Insertion: humerus (0.02664321 0.0008732344 -0.002442762)
      PathWrap: wrap_object=humeral_head method=hybrid
    Millard2012EquilibriumMuscle Subscap8: max_isometric_force=61 optimal_fiber_length=0.0765 tendon_slack_length=0.04
      PathPoint Origin: scapula (0.01991721 -0.06545402 -0.06847018)
      PathPoint Insertion: humerus (0.02664321 0.0008732344 -0.002442762)
      PathWrap: wrap_object=humeral_head method=hybrid
    Millard2012EquilibriumMuscle Subscap9: max_isometric_force=222 optimal_fiber_length=0.0721
        tendon_slack_length=0.059
      PathPoint Origin: scapula (0.01229109 -0.09209592 -0.07974767)
      PathPoint Insertion: humerus (0.02331002 -0.003742652 -0.006572344)
      PathWrap: wrap_object=humeral_head method=hybrid
    Millard2012EquilibriumMuscle Subscap10: max_isometric_force=47 optimal_fiber_length=0.0676 tendon_slack_length=0.01
      PathPoint Origin: scapula (0.02109102 -0.05426349 -0.04635788)
      PathPoint Insertion: humerus (0.01554416 -0.01704362 -0.007412425)
      PathWrap: wrap_object=humeral_head method=hybrid
    Millard2012EquilibriumMuscle Subscap11: max_isometric_force=16 optimal_fiber_length=0.0643 tendon_slack_length=0
      PathPoint Origin: scapula (0.02880651 -0.04566904 -0.03612525)
      PathPoint Insertion: humerus (0.010247 -0.02286432 -0.009736117)
      PathWrap: wrap_object=humeral_head method=hybrid
    Millard2012EquilibriumMuscle LatDors1: max_isometric_force=56 optimal_fiber_length=0.2343 tendon_slack_length=0.09
      PathPoint Origin: thorax (-0.1526 -0.126 0.0098)
      PathPoint Insertion: humerus (0.01764415 -0.03789199 0.001378794)
      PathWrap: wrap_object=humerus method=hybrid
    Millard2012EquilibriumMuscle LatDors2: max_isometric_force=88 optimal_fiber_length=0.2857 tendon_slack_length=0.083
      PathPoint Origin: thorax (-0.1482 -0.1967 0.013)
      PathPoint Insertion: humerus (0.01724346 -0.04446538 0.002133741)
      PathWrap: wrap_object=humerus method=hybrid
    Millard2012EquilibriumMuscle LatDors3: max_isometric_force=129 optimal_fiber_length=0.2951
        tendon_slack_length=0.105
      PathPoint Origin: thorax (-0.1392 -0.2515 0.0116)
      PathPoint Insertion: humerus (0.01724346 -0.04446538 0.002133741)
      PathWrap: wrap_object=humerus method=hybrid
    Millard2012EquilibriumMuscle LatDors4: max_isometric_force=96 optimal_fiber_length=0.3206 tendon_slack_length=0.12
      PathPoint Origin: thorax (-0.128 -0.3109 0.0211)
      PathPoint Insertion: humerus (0.01764415 -0.03789199 0.001378794)
      PathWrap: wrap_object=humerus method=hybrid
    Millard2012EquilibriumMuscle LatDors5: max_isometric_force=88 optimal_fiber_length=0.3129 tendon_slack_length=0.072
      PathPoint Origin: thorax (-0.0992 -0.3084 0.0792)
      PathPoint Insertion: humerus (0.01764415 -0.03789199 0.001378794)
      PathWrap: wrap_object=humerus method=hybrid
    Millard2012EquilibriumMuscle LatDors6: max_isometric_force=105 optimal_fiber_length=0.3402
        tendon_slack_length=0.069
      PathPoint Origin: thorax (-0.0851 -0.2978 0.1042)
      PathPoint Insertion: humerus (0.01724346 -0.04446538 0.002133741)
      PathWrap: wrap_object=humerus method=hybrid
    Millard2012EquilibriumMuscle PectMajT1: max_isometric_force=125 optimal_fiber_length=0.1884
        tendon_slack_length=0.036
      PathPoint Origin: thorax (0.0321 -0.1574 0.0612)
      PathPoint Insertion: humerus (0.01727309 -0.06309849 0.01034511)
      PathWrap: wrap_object=humerus method=hybrid
    Millard2012EquilibriumMuscle PectMajT2: max_isometric_force=118 optimal_fiber_length=0.183
        tendon_slack_length=0.043
      PathPoint Origin: thorax (0.0392 -0.1403 0.0279)
      PathPoint Insertion: humerus (0.01702046 -0.06875219 0.01089453)
      PathWrap: wrap_object=humerus method=hybrid
    Millard2012EquilibriumMuscle PectMajT3: max_isometric_force=165 optimal_fiber_length=0.1853
        tendon_slack_length=0.053
      PathPoint Origin: thorax (0.0348 -0.1223 0.0084)
      PathPoint Insertion: humerus (0.01674661 -0.07380109 0.0107778)
      PathWrap: wrap_object=humerus method=hybrid
    Millard2012EquilibriumMuscle PectMajT4: max_isometric_force=157 optimal_fiber_length=0.1833
        tendon_slack_length=0.028
      PathPoint Origin: thorax (0.0372 -0.1006 0.0132)
      PathPoint Insertion: humerus (0.01752479 -0.06428446 0.01110677)
      PathWrap: wrap_object=humerus method=hybrid
    Millard2012EquilibriumMuscle PectMajT5: max_isometric_force=133 optimal_fiber_length=0.15 tendon_slack_length=0.026
      PathPoint Origin: thorax (0.019 -0.0418 0.0071)
      PathPoint Insertion: humerus (0.01808459 -0.05418413 0.01111697)
      PathWrap: wrap_object=humerus method=hybrid
    Millard2012EquilibriumMuscle PectMajT6: max_isometric_force=198 optimal_fiber_length=0.1449
        tendon_slack_length=0.036
      PathPoint Origin: thorax (0.0061 -0.0227 0.0116)
      PathPoint Insertion: humerus (0.01752479 -0.06428446 0.01110677)
      PathWrap: wrap_object=humerus method=hybrid
    Millard2012EquilibriumMuscle PectMajC1: max_isometric_force=179 optimal_fiber_length=0.1363
        tendon_slack_length=0.017
      PathPoint Origin: clavicle (0.01968791 -0.01129247 0.0393752)
      PathPoint Insertion: humerus (0.01555215 -0.08869093 0.01184357)
      PathWrap: wrap_object=humerus method=hybrid
    Millard2012EquilibriumMuscle PectMajC2: max_isometric_force=113 optimal_fiber_length=0.1091
        tendon_slack_length=0.014
      PathPoint Origin: clavicle (0.01828829 -0.008950699 0.05915668)
      PathPoint Insertion: humerus (0.01808459 -0.05418413 0.01111697)
      PathWrap: wrap_object=humerus method=hybrid
    Millard2012EquilibriumMuscle BicLongProx: appliesForce=false max_isometric_force=347 optimal_fiber_length=0.1292
        tendon_slack_length=0.2335
      PathPoint Origin: scapula (0.0428828 -0.002489982 -0.01353239)
      PathPoint Insertion: humerus (0.01543979 0.01790057 0.01031079)
    Millard2012EquilibriumMuscle BicLongDist: appliesForce=false max_isometric_force=347 optimal_fiber_length=0.1292
        tendon_slack_length=0.2335
      PathPoint Origin: humerus (0.02084119 -0.01412111 0.008897709)
      PathPoint Insertion: radius (-0.01531115 0.2026454 0.002093207)
    Millard2012EquilibriumMuscle BicLong: max_isometric_force=347 optimal_fiber_length=0.1292
        tendon_slack_length=0.2335
      PathPoint Origin: scapula (0.0428828 -0.002489982 -0.01353239)
      PathPoint ViaPoint: humerus (0.01814049 0.001889732 0.009604251)
      PathPoint Insertion: radius (-0.01531115 0.2026454 0.002093207)
      PathWrap: wrap_object=humeral_head method=hybrid
      PathWrap pathwrap_0: wrap_object=biceps_brachii method=hybrid
    Millard2012EquilibriumMuscle BicShort1: max_isometric_force=173 optimal_fiber_length=0.117
        tendon_slack_length=0.1913
      PathPoint Origin: scapula (0.08243794 -0.008331658 -0.009146551)
      PathPoint Insertion: radius (-0.01531115 0.2026454 0.002093207)
      PathWrap: wrap_object=biceps_brachii method=hybrid
    Millard2012EquilibriumMuscle BicShort2: max_isometric_force=322 optimal_fiber_length=0.1149
        tendon_slack_length=0.1927
      PathPoint Origin: scapula (0.08243794 -0.008331658 -0.009146551)
      PathPoint Insertion: radius (-0.01531115 0.2026454 0.002093207)
      PathWrap: wrap_object=biceps_brachii method=hybrid
    Millard2012EquilibriumMuscle TriLong1: max_isometric_force=223 optimal_fiber_length=0.1008
        tendon_slack_length=0.2041 pennation_angle_at_optimal=0.1745329
      PathPoint Origin: scapula (0.02056323 -0.0437846 -0.03221665)
      PathPoint Insertion: ulna (-0.02106754 0.2470724 -0.01553453)
      PathWrap: wrap_object=triceps method=hybrid
    Millard2012EquilibriumMuscle TriLong2: max_isometric_force=296 optimal_fiber_length=0.0881
        tendon_slack_length=0.2193 pennation_angle_at_optimal=0.1745329
      PathPoint Origin: scapula (0.03743905 -0.04193134 -0.02425222)
      PathPoint Insertion: ulna (-0.01542482 0.2410157 -0.003384765)
      PathWrap: wrap_object=triceps method=hybrid
    Millard2012EquilibriumMuscle TriLong3: max_isometric_force=283 optimal_fiber_length=0.1183
        tendon_slack_length=0.218 pennation_angle_at_optimal=0.1745329
      PathPoint Origin: scapula (0.02787104 -0.03911224 -0.02254168)
      PathPoint Insertion: ulna (-0.0220309 0.2118807 -0.006730896)
      PathWrap: wrap_object=triceps method=hybrid
    Millard2012EquilibriumMuscle TriLong4: max_isometric_force=327 optimal_fiber_length=0.1226
        tendon_slack_length=0.2197
      PathPoint Origin: scapula (0.03743905 -0.04193134 -0.02425222)
      PathPoint Insertion: ulna (-0.01645347 0.2139532 -0.003843536)
      PathWrap: wrap_object=triceps method=hybrid
    Millard2012EquilibriumMuscle TriMed1: max_isometric_force=263 optimal_fiber_length=0.0807
        tendon_slack_length=0.0875 pennation_angle_at_optimal=0.296706
      PathPoint Origin: humerus (7.339114e-5 -0.1485367 -0.007140255)
      PathPoint Insertion: ulna (-0.03014433 0.2570896 -0.01105145)
      PathWrap: wrap_object=triceps method=hybrid
    Millard2012EquilibriumMuscle TriMed2: max_isometric_force=256 optimal_fiber_length=0.0773
        tendon_slack_length=0.1122
      PathPoint Origin: humerus (-0.002960554 -0.1240197 -0.006221206)
      PathPoint Insertion: ulna (-0.03014433 0.2570896 -0.01105145)
      PathWrap: wrap_object=triceps method=hybrid
    Millard2012EquilibriumMuscle TriMed3: max_isometric_force=240 optimal_fiber_length=0.0602
        tendon_slack_length=0.0107
      PathPoint Origin: humerus (-0.01321065 -0.2418418 0.009358771)
      PathPoint Insertion: ulna (-0.03014433 0.2570896 -0.01105145)
      PathWrap: wrap_object=triceps method=hybrid
    Millard2012EquilibriumMuscle TriMed4: max_isometric_force=211 optimal_fiber_length=0.0746
        tendon_slack_length=0.0404 pennation_angle_at_optimal=0.1396263
      PathPoint Origin: humerus (-0.0161462 -0.1998885 0.002642124)
      PathPoint Insertion: ulna (-0.03014433 0.2570896 -0.01105145)
      PathWrap: wrap_object=triceps method=hybrid
    Millard2012EquilibriumMuscle TriMed5: max_isometric_force=107 optimal_fiber_length=0.0807
        tendon_slack_length=0.0738
      PathPoint Origin: humerus (-0.009094003 -0.1564603 -0.005800783)
      PathPoint Insertion: ulna (-0.03014433 0.2570896 -0.01105145)
      PathWrap: wrap_object=triceps method=hybrid
    Millard2012EquilibriumMuscle TriLat1: max_isometric_force=153 optimal_fiber_length=0.0758
        tendon_slack_length=0.1707
      PathPoint Origin: humerus (-0.01100288 -0.05494724 0.006306909)
      PathPoint Insertion: ulna (-0.02402268 0.2714813 -0.008312073)
      PathWrap: wrap_object=triceps method=hybrid
    Millard2012EquilibriumMuscle TriLat2: max_isometric_force=410 optimal_fiber_length=0.0766 tendon_slack_length=0.177
        pennation_angle_at_optimal=0.08726646
      PathPoint Origin: humerus (-0.01100288 -0.05494724 0.006306909)
      PathPoint Insertion: ulna (-0.02576716 0.2691491 -0.007902295)
      PathWrap: wrap_object=triceps method=hybrid
    Millard2012EquilibriumMuscle TriLat3: max_isometric_force=219 optimal_fiber_length=0.0656
        tendon_slack_length=0.1911 pennation_angle_at_optimal=0.1745329
      PathPoint Origin: humerus (-0.01100288 -0.05494724 0.006306909)
      PathPoint Insertion: ulna (-0.02521872 0.2617598 -1.073328e-5)
      PathWrap: wrap_object=triceps method=hybrid
    Millard2012EquilibriumMuscle TriLat4: max_isometric_force=275 optimal_fiber_length=0.0638 tendon_slack_length=0.157
        pennation_angle_at_optimal=0.1745329
      PathPoint Origin: humerus (-0.01048244 -0.09511829 0.01210659)
      PathPoint Insertion: ulna (-0.02521872 0.2617598 -1.073328e-5)
      PathWrap: wrap_object=triceps method=hybrid
    Millard2012EquilibriumMuscle TriLat5: max_isometric_force=87 optimal_fiber_length=0.0638 tendon_slack_length=0.157
        pennation_angle_at_optimal=0.296706
      PathPoint Origin: humerus (-0.01048244 -0.09511829 0.01210659)
      PathPoint Insertion: ulna (-0.02300159 0.2658125 -0.001550272)
      PathWrap: wrap_object=triceps method=hybrid
    Millard2012EquilibriumMuscle Brach1: max_isometric_force=314 optimal_fiber_length=0.0876 tendon_slack_length=0.0807
      PathPoint Origin: humerus (-0.006247346 -0.1485438 0.009537222)
      PathPoint Insertion: ulna (-0.009223558 0.2154301 -0.01878633)
      PathWrap: wrap_object=brachialis method=hybrid
    Millard2012EquilibriumMuscle Brach2: max_isometric_force=158 optimal_fiber_length=0.0953 tendon_slack_length=0.0592
      PathPoint Origin: humerus (0.005174905 -0.1539988 -0.002849647)
      PathPoint Insertion: ulna (-0.01137701 0.2190445 -0.02192772)
      PathWrap: wrap_object=brachialis method=hybrid
    Millard2012EquilibriumMuscle Brach3: max_isometric_force=157 optimal_fiber_length=0.087 tendon_slack_length=0.0394
      PathPoint Origin: humerus (0.0003331744 -0.1803495 -0.008695287)
      PathPoint Insertion: ulna (-0.01163789 0.2316346 -0.02532816)
      PathWrap: wrap_object=brachialis method=hybrid
    Millard2012EquilibriumMuscle Brach4: max_isometric_force=87 optimal_fiber_length=0.0758 tendon_slack_length=0.0317
      PathPoint Origin: humerus (0.00104338 -0.1907813 -0.000175119)
      PathPoint Insertion: ulna (-0.01006929 0.2184969 -0.01864749)
      PathWrap: wrap_object=brachialis method=hybrid
    Millard2012EquilibriumMuscle Brach5: max_isometric_force=101 optimal_fiber_length=0.0619 tendon_slack_length=0.0209
      PathPoint Origin: humerus (-0.005141042 -0.2213397 -0.01268044)
      PathPoint Insertion: ulna (-0.01172887 0.2242658 -0.02401921)
      PathWrap: wrap_object=brachialis method=hybrid
    Millard2012EquilibriumMuscle Brach6: max_isometric_force=104 optimal_fiber_length=0.0472 tendon_slack_length=0.035
      PathPoint Origin: humerus (-0.0002084918 -0.2296702 -0.00198169)
      PathPoint Insertion: ulna (-0.009683347 0.2291147 -0.02532083)
      PathWrap: wrap_object=brachialis method=hybrid
    Millard2012EquilibriumMuscle Brach7: max_isometric_force=118 optimal_fiber_length=0.0621 tendon_slack_length=0.0076
      PathPoint Origin: humerus (-0.003994997 -0.2366009 -0.01261176)
      PathPoint Insertion: ulna (-0.008578992 0.219579 -0.01539355)
      PathWrap: wrap_object=brachialis method=hybrid
    Millard2012EquilibriumMuscle Anco1: max_isometric_force=31 optimal_fiber_length=0.0252 tendon_slack_length=0.0064
      PathPoint Origin: humerus (-0.0129118 -0.2922707 0.01337321)
      PathPoint Insertion: ulna (-0.02055894 0.2373951 0.007718478)
    Millard2012EquilibriumMuscle Anco2: max_isometric_force=70 optimal_fiber_length=0.0202 tendon_slack_length=0.008
        pennation_angle_at_optimal=0.2617994
      PathPoint Origin: humerus (-0.01149321 -0.2961414 0.01152515)
      PathPoint Insertion: ulna (-0.02008423 0.2338281 0.008229363)
    Millard2012EquilibriumMuscle Anco3: max_isometric_force=25 optimal_fiber_length=0.0228 tendon_slack_length=0.0043
      PathPoint Origin: humerus (-0.01447773 -0.2868876 0.01200552)
      PathPoint Insertion: ulna (-0.0210462 0.2408651 0.00718724)
    Millard2012EquilibriumMuscle Anco4: max_isometric_force=118 optimal_fiber_length=0.027 tendon_slack_length=0.03
        pennation_angle_at_optimal=0.3141593
      PathPoint Origin: humerus (-0.006320918 -0.2967751 0.01591899)
      PathPoint Insertion: ulna (-0.02086708 0.2009407 0.00936765)
    Millard2012EquilibriumMuscle Anco5: max_isometric_force=118 optimal_fiber_length=0.0266 tendon_slack_length=0.02
        pennation_angle_at_optimal=0.4014257
      PathPoint Origin: humerus (-0.008181427 -0.2976487 0.01446457)
      PathPoint Insertion: ulna (-0.02147578 0.2169419 0.008086841)
    Millard2012EquilibriumMuscle Brachiorad1: max_isometric_force=30 optimal_fiber_length=0.1613
        tendon_slack_length=0.1197
      PathPoint Origin: humerus (-0.008751989 -0.1996797 0.002821307)
      PathPoint Insertion: radius (-0.0009671415 0.009858397 0.0008041476)
    Millard2012EquilibriumMuscle Brachiorad2: max_isometric_force=82 optimal_fiber_length=0.1613
        tendon_slack_length=0.1197
      PathPoint Origin: humerus (-0.01532095 -0.2175018 0.00445841)
      PathPoint Insertion: radius (-0.0009671415 0.009858397 0.0008041476)
    Millard2012EquilibriumMuscle Brachiorad3: max_isometric_force=52 optimal_fiber_length=0.1066
        tendon_slack_length=0.1542
      PathPoint Origin: humerus (-0.01649322 -0.2343013 0.005996474)
      PathPoint Insertion: radius (-0.0009671415 0.009858397 0.0008041476)
    Millard2012EquilibriumMuscle PronTerHum: max_isometric_force=510 optimal_fiber_length=0.051
        tendon_slack_length=0.0851
      PathPoint Origin: humerus (-0.006348144 -0.2768606 -0.03769467)
      PathPoint Insertion: radius (0.01154627 0.133435 -0.01132711)
      PathWrap: wrap_object=pronator_teres method=hybrid
    Millard2012EquilibriumMuscle PronTerUl: max_isometric_force=141 optimal_fiber_length=0.0391
        tendon_slack_length=0.0484
      PathPoint Origin: ulna (0.004388488 0.2317225 -0.01204556)
      PathPoint Insertion: radius (0.004245443 0.1559644 -0.01626936)
      PathWrap: wrap_object=pronator_teres method=hybrid
    Millard2012EquilibriumMuscle Supin1: max_isometric_force=47 optimal_fiber_length=0.0267 tendon_slack_length=0.0254
      PathPoint Origin: ulna (-0.01580408 0.1703418 0.009249469)
      PathPoint Insertion: radius (0.006676517 0.1571506 -0.01221933)
      PathWrap: wrap_object=supinator method=hybrid
    Millard2012EquilibriumMuscle Supin2: max_isometric_force=232 optimal_fiber_length=0.0148 tendon_slack_length=0.0231
      PathPoint Origin: ulna (-0.004229922 0.185458 0.01450585)
      PathPoint Insertion: radius (0.006443973 0.1697021 -0.008254823)
      PathWrap: wrap_object=supinator method=hybrid
    Millard2012EquilibriumMuscle Supin3: max_isometric_force=126 optimal_fiber_length=0.0252 tendon_slack_length=0.015
      PathPoint Origin: ulna (-0.008437113 0.2022374 0.01517062)
      PathPoint Insertion: radius (0.002207546 0.1809962 -0.01557783)
      PathWrap: wrap_object=supinator method=hybrid
    Millard2012EquilibriumMuscle Supin4: max_isometric_force=148 optimal_fiber_length=0.0263 tendon_slack_length=0.0145
      PathPoint Origin: ulna (-0.007615446 0.2119686 0.01589756)
      PathPoint Insertion: radius (-0.002084168 0.1890552 -0.01505598)
      PathWrap: wrap_object=supinator method=hybrid
    Millard2012EquilibriumMuscle Supin5: max_isometric_force=285 optimal_fiber_length=0.0274 tendon_slack_length=0.0139
        pennation_angle_at_optimal=0.03490659
      PathPoint Origin: ulna (-0.006828262 0.2217322 0.01649122)
      PathPoint Insertion: radius (-0.006312902 0.1971305 -0.01445816)
      PathWrap: wrap_object=supinator method=hybrid
    Millard2012EquilibriumMuscle PronQuad1: max_isometric_force=73 optimal_fiber_length=0.0377
        tendon_slack_length=0.0001
      PathPoint Origin: radius (-0.000862257 0.03146994 0.00992721)
      PathPoint Insertion: ulna (0.003484386 0.04845453 -0.009758982)
      PathWrap: wrap_object=pronator_quadratus method=hybrid
    Millard2012EquilibriumMuscle PronQuad2: max_isometric_force=178 optimal_fiber_length=0.0386
        tendon_slack_length=0.0001
      PathPoint Origin: radius (-0.0004007425 0.02637254 0.009316038)
      PathPoint Insertion: ulna (0.005869125 0.03045933 -0.007921667)
      PathWrap: wrap_object=pronator_quadratus method=hybrid
    Millard2012EquilibriumMuscle PronQuad3: max_isometric_force=219 optimal_fiber_length=0.0352
        tendon_slack_length=0.0001
      PathPoint Origin: radius (-0.004078124 0.01726242 0.01114978)
      PathPoint Insertion: ulna (-0.006669089 0.01484155 -0.01343509)
      PathWrap: wrap_object=pronator_quadratus method=hybrid
    ObjectGroup Trapezius_scapular_portion: members=(TrapScap1 TrapScap2 TrapScap3 TrapScap4 TrapScap5 TrapScap6 TrapScap7 TrapScap8 TrapScap9 TrapScap10 TrapScap11)
    ObjectGroup Trapezius_clavicular_portion: members=(TrapClav1 TrapClav2)
    ObjectGroup Levator_scapulae: members=(LevScap1 LevScap2)
    ObjectGroup Pectoralis_minor: members=(PectMin1 PectMin2 PectMin3 PectMin4)
    ObjectGroup Rhomboideus: members=(Rhomb1 Rhomb2 Rhomb3 Rhomb4 Rhomb5)
    ObjectGroup Serratus_anterior: members=(SerrAnt1 SerrAnt2 SerrAnt3 SerrAnt4 SerrAnt5 SerrAnt6 SerrAnt7 SerrAnt8 SerrAnt9 SerrAnt10 SerrAnt11 SerrAnt12)
    ObjectGroup Deltoideus_scapular_portion: members=(DeltScap1 DeltScap2 DeltScap3 DeltScap4 DeltScap5 DeltScap6 DeltScap7 DeltScap8 DeltScap9 DeltScap10 DeltScap11)
    ObjectGroup Deltoideus_clavicular_portion: members=(DeltClav1 DeltClav2 DeltClav3 DeltClav4)
    ObjectGroup Coracobrachialis: members=(Coracobr1 Coracobr2 Coracobr3)
    ObjectGroup Infraspinatus: members=(Infra1 Infra2 Infra3 Infra4 Infra5 Infra6)
    ObjectGroup Teres_minor: members=(TerMin1 TerMin2 TerMin3)
    ObjectGroup Teres_major: members=(TerMaj1 TerMaj2 TerMaj3 TerMaj4)
    ObjectGroup Supraspinatus: members=(Supra1 Supra2 Supra3 Supra4)
    ObjectGroup Subscapularis: members=(Subscap1 Subscap2 Subscap3 Subscap4 Subscap5 Subscap6 Subscap7 Subscap8 Subscap9 Subscap10 Subscap11)
    ObjectGroup Latissimus_dorsi: members=(LatDors1 LatDors2 LatDors3 LatDors4 LatDors5 LatDors6)
    ObjectGroup Pectoralis_major_thoracic_portion: members=(PectMajT1 PectMajT2 PectMajT3 PectMajT4 PectMajT5 PectMajT6)
    ObjectGroup Pectoralis_major_clavicular_portion: members=(PectMajC1 PectMajC2)
    ObjectGroup Biceps_brachii_long_head: members=(BicLongProx BicLongDist BicLong)
    ObjectGroup Biceps_brachii_short_head: members=(BicShort1 BicShort2)
    ObjectGroup Triceps_brachii_long_head: members=(TriLong1 TriLong2 TriLong3 TriLong4)
    ObjectGroup Triceps_brachii_medial_head: members=(TriMed1 TriMed2 TriMed3 TriMed4 TriMed5)
    ObjectGroup Triceps_brachii_lateral_head: members=(TriLat1 TriLat2 TriLat3 TriLat4 TriLat5)
    ObjectGroup Brachialis: members=(Brach1 Brach2 Brach3 Brach4 Brach5 Brach6 Brach7)
    ObjectGroup Anconeus: members=(Anco1 Anco2 Anco3 Anco4 Anco5)
    ObjectGroup Brachioradialis: members=(Brachiorad1 Brachiorad2 Brachiorad3)
    ObjectGroup Pronator_teres: members=(PronTerHum PronTerUl)
    ObjectGroup Supinator: members=(Supin1 Supin2 Supin3 Supin4 Supin5)
    ObjectGroup Pronator_quadratus: members=(PronQuad1 PronQuad2 PronQuad3)
  MarkerSet:
    Marker IJ: thorax (0 0 0)
    Marker PX: thorax (0.0319 -0.1327 -0.0098)
    Marker C7: thorax (-0.1242 0.0541 0)
    Marker T1: thorax (-0.1368 0.0362 0.0014)
    Marker T8: thorax (-0.1561 -0.1715 0.0098)
    Marker ThoraxCenterOfMass: thorax (-0.0591 -0.1486 0)
    Marker SC: clavicle (0 0 0)
    Marker AC: clavicle (1.906454e-18 -5.533744e-19 0.1575311)
    Marker ClavicleCenterOfMass: clavicle (-0.0008808371 -0.005339956 0.07473767)
    Marker TS: scapula (-6.484243e-18 -9.826063e-19 -0.1203601)
    Marker AI: scapula (-3.194099e-19 -0.1174352 -0.1151385)
    Marker AA: scapula (0 0 0)
    Marker PC: scapula (0.08243794 -0.008331658 -0.009146551)
    Marker MidPointGlenoid: scapula (0.04040715 -0.02030851 -0.02073178)
    Marker ScapulaCenterOfMass: scapula (0.02474335 -0.02287396 -0.05301357)
    Marker ScapulaCenterPoint: scapula (1.538255e-17 -0.03914508 -0.07849953)
    Marker GH: humerus (0 0 0)
    Marker EM: humerus (7.496014e-19 -0.2898347 -0.03395893)
    Marker EL: humerus (-2.21754e-18 -0.2844213 0.03395893)
    Marker HumeralHeadCenter: humerus (0.001267308 0.001840329 -0.001702092)
    Marker HumerusCenterOfMass: humerus (0.003622808 -0.07755037 0.006440892)
    Marker US: ulna (0 0 0)
    Marker OL: ulna (-0.01626877 0.2654584 -0.004503879)
    Marker UlnaCenterOfMass: ulna (-0.01586136 0.1946836 -0.007104505)
    Marker RS: radius (0 0 0)
    Marker RadiusCenterOfMass: radius (-0.007422616 0.1200718 0.00106459)
    Marker MidPointStyloids: hand (-3.149937e-5 0.09759066 -3.834449e-5)
    Marker HandCenterofMass: hand (0 0 0)
  ProbeSet:
    Umberger2010MuscleMetabolicsProbe MuscleMetabolics:
      Umberger2010MuscleMetabolicsProbe_MetabolicMuscleParameterSet:
        Umberger2010MuscleMetabolicsProbe_MetabolicMuscleParameter [values shared by the 140 below unless stated]: ratio_slow_twitch_fibers=0.5
            use_provided_muscle_mass=true
        Umberger2010MuscleMetabolicsProbe_MetabolicMuscleParameter TrapScap1: provided_muscle_mass=0.01954 [kg]
        Umberger2010MuscleMetabolicsProbe_MetabolicMuscleParameter TrapScap2: provided_muscle_mass=0.02161
        Umberger2010MuscleMetabolicsProbe_MetabolicMuscleParameter TrapScap3: provided_muscle_mass=0.02419
        Umberger2010MuscleMetabolicsProbe_MetabolicMuscleParameter TrapScap4: provided_muscle_mass=0.01494
        Umberger2010MuscleMetabolicsProbe_MetabolicMuscleParameter TrapScap5: provided_muscle_mass=0.0128
        Umberger2010MuscleMetabolicsProbe_MetabolicMuscleParameter TrapScap6: provided_muscle_mass=0.01025
        Umberger2010MuscleMetabolicsProbe_MetabolicMuscleParameter TrapScap7: provided_muscle_mass=0.00958
        Umberger2010MuscleMetabolicsProbe_MetabolicMuscleParameter TrapScap8: provided_muscle_mass=0.01212
        Umberger2010MuscleMetabolicsProbe_MetabolicMuscleParameter TrapScap9: provided_muscle_mass=0.01416
        Umberger2010MuscleMetabolicsProbe_MetabolicMuscleParameter TrapScap10: provided_muscle_mass=0.01158
        Umberger2010MuscleMetabolicsProbe_MetabolicMuscleParameter TrapScap11: provided_muscle_mass=0.01407
        Umberger2010MuscleMetabolicsProbe_MetabolicMuscleParameter TrapClav1: provided_muscle_mass=0.01712
        Umberger2010MuscleMetabolicsProbe_MetabolicMuscleParameter TrapClav2: provided_muscle_mass=0.00969
        Umberger2010MuscleMetabolicsProbe_MetabolicMuscleParameter LevScap1: provided_muscle_mass=0.01731
        Umberger2010MuscleMetabolicsProbe_MetabolicMuscleParameter LevScap2: provided_muscle_mass=0.01731
        Umberger2010MuscleMetabolicsProbe_MetabolicMuscleParameter PectMin1: provided_muscle_mass=0.00407
        Umberger2010MuscleMetabolicsProbe_MetabolicMuscleParameter PectMin2: provided_muscle_mass=0.01323
        Umberger2010MuscleMetabolicsProbe_MetabolicMuscleParameter PectMin3: provided_muscle_mass=0.01303
        Umberger2010MuscleMetabolicsProbe_MetabolicMuscleParameter PectMin4: provided_muscle_mass=0.0072
        Umberger2010MuscleMetabolicsProbe_MetabolicMuscleParameter Rhomb1: provided_muscle_mass=0.00575
        Umberger2010MuscleMetabolicsProbe_MetabolicMuscleParameter Rhomb2: provided_muscle_mass=0.0113
        Umberger2010MuscleMetabolicsProbe_MetabolicMuscleParameter Rhomb3: provided_muscle_mass=0.02034
        Umberger2010MuscleMetabolicsProbe_MetabolicMuscleParameter Rhomb4: provided_muscle_mass=0.01176
        Umberger2010MuscleMetabolicsProbe_MetabolicMuscleParameter Rhomb5: provided_muscle_mass=0.00885
        Umberger2010MuscleMetabolicsProbe_MetabolicMuscleParameter SerrAnt1: provided_muscle_mass=0.01139
        Umberger2010MuscleMetabolicsProbe_MetabolicMuscleParameter SerrAnt2: provided_muscle_mass=0.02083
        Umberger2010MuscleMetabolicsProbe_MetabolicMuscleParameter SerrAnt3: provided_muscle_mass=0.01925
        Umberger2010MuscleMetabolicsProbe_MetabolicMuscleParameter SerrAnt4: provided_muscle_mass=0.01629
        Umberger2010MuscleMetabolicsProbe_MetabolicMuscleParameter SerrAnt5: provided_muscle_mass=0.00909
        Umberger2010MuscleMetabolicsProbe_MetabolicMuscleParameter SerrAnt6: provided_muscle_mass=0.01345
        Umberger2010MuscleMetabolicsProbe_MetabolicMuscleParameter SerrAnt7: provided_muscle_mass=0.00609
        Umberger2010MuscleMetabolicsProbe_MetabolicMuscleParameter SerrAnt8: provided_muscle_mass=0.00729
        Umberger2010MuscleMetabolicsProbe_MetabolicMuscleParameter SerrAnt9: provided_muscle_mass=0.00724
        Umberger2010MuscleMetabolicsProbe_MetabolicMuscleParameter SerrAnt10: provided_muscle_mass=0.00476
        Umberger2010MuscleMetabolicsProbe_MetabolicMuscleParameter SerrAnt11: provided_muscle_mass=0.00229
        Umberger2010MuscleMetabolicsProbe_MetabolicMuscleParameter SerrAnt12: provided_muscle_mass=0.01212
        Umberger2010MuscleMetabolicsProbe_MetabolicMuscleParameter DeltScap1: provided_muscle_mass=0.03703
        Umberger2010MuscleMetabolicsProbe_MetabolicMuscleParameter DeltScap2: provided_muscle_mass=0.02269
        Umberger2010MuscleMetabolicsProbe_MetabolicMuscleParameter DeltScap3: provided_muscle_mass=0.04214
        Umberger2010MuscleMetabolicsProbe_MetabolicMuscleParameter DeltScap4: provided_muscle_mass=0.00888
        Umberger2010MuscleMetabolicsProbe_MetabolicMuscleParameter DeltScap5: provided_muscle_mass=0.00891
        Umberger2010MuscleMetabolicsProbe_MetabolicMuscleParameter DeltScap6: provided_muscle_mass=0.02485
        Umberger2010MuscleMetabolicsProbe_MetabolicMuscleParameter DeltScap7: provided_muscle_mass=0.01275
        Umberger2010MuscleMetabolicsProbe_MetabolicMuscleParameter DeltScap8: provided_muscle_mass=0.0173
        Umberger2010MuscleMetabolicsProbe_MetabolicMuscleParameter DeltScap9: provided_muscle_mass=0.02378
        Umberger2010MuscleMetabolicsProbe_MetabolicMuscleParameter DeltScap10: provided_muscle_mass=0.0379
        Umberger2010MuscleMetabolicsProbe_MetabolicMuscleParameter DeltScap11: provided_muscle_mass=0.02012
        Umberger2010MuscleMetabolicsProbe_MetabolicMuscleParameter DeltClav1: provided_muscle_mass=0.01217
        Umberger2010MuscleMetabolicsProbe_MetabolicMuscleParameter DeltClav2: provided_muscle_mass=0.01701
        Umberger2010MuscleMetabolicsProbe_MetabolicMuscleParameter DeltClav3: provided_muscle_mass=0.00983
        Umberger2010MuscleMetabolicsProbe_MetabolicMuscleParameter DeltClav4: provided_muscle_mass=0.01259
        Umberger2010MuscleMetabolicsProbe_MetabolicMuscleParameter Coracobr1: provided_muscle_mass=0.01506
        Umberger2010MuscleMetabolicsProbe_MetabolicMuscleParameter Coracobr2: provided_muscle_mass=0.01151
        Umberger2010MuscleMetabolicsProbe_MetabolicMuscleParameter Coracobr3: provided_muscle_mass=0.00939
        Umberger2010MuscleMetabolicsProbe_MetabolicMuscleParameter Infra1: provided_muscle_mass=0.01961
        Umberger2010MuscleMetabolicsProbe_MetabolicMuscleParameter Infra2: provided_muscle_mass=0.02245
        Umberger2010MuscleMetabolicsProbe_MetabolicMuscleParameter Infra3: provided_muscle_mass=0.01488
        Umberger2010MuscleMetabolicsProbe_MetabolicMuscleParameter Infra4: provided_muscle_mass=0.01631
        Umberger2010MuscleMetabolicsProbe_MetabolicMuscleParameter Infra5: provided_muscle_mass=0.02414
        Umberger2010MuscleMetabolicsProbe_MetabolicMuscleParameter Infra6: provided_muscle_mass=0.01564
        Umberger2010MuscleMetabolicsProbe_MetabolicMuscleParameter TerMin1: provided_muscle_mass=0.00714
        Umberger2010MuscleMetabolicsProbe_MetabolicMuscleParameter TerMin2: provided_muscle_mass=0.01221
        Umberger2010MuscleMetabolicsProbe_MetabolicMuscleParameter TerMin3: provided_muscle_mass=0.01041
        Umberger2010MuscleMetabolicsProbe_MetabolicMuscleParameter TerMaj1: provided_muscle_mass=0.02643
        Umberger2010MuscleMetabolicsProbe_MetabolicMuscleParameter TerMaj2: provided_muscle_mass=0.01549
        Umberger2010MuscleMetabolicsProbe_MetabolicMuscleParameter TerMaj3: provided_muscle_mass=0.03481
        Umberger2010MuscleMetabolicsProbe_MetabolicMuscleParameter TerMaj4: provided_muscle_mass=0.01971
        Umberger2010MuscleMetabolicsProbe_MetabolicMuscleParameter Supra1: provided_muscle_mass=0.0074
        Umberger2010MuscleMetabolicsProbe_MetabolicMuscleParameter Supra2: provided_muscle_mass=0.00756
        Umberger2010MuscleMetabolicsProbe_MetabolicMuscleParameter Supra3: provided_muscle_mass=0.01651
        Umberger2010MuscleMetabolicsProbe_MetabolicMuscleParameter Supra4: provided_muscle_mass=0.00819
        Umberger2010MuscleMetabolicsProbe_MetabolicMuscleParameter Subscap1: provided_muscle_mass=0.00281
        Umberger2010MuscleMetabolicsProbe_MetabolicMuscleParameter Subscap2: provided_muscle_mass=0.02021
        Umberger2010MuscleMetabolicsProbe_MetabolicMuscleParameter Subscap3: provided_muscle_mass=0.00575
        Umberger2010MuscleMetabolicsProbe_MetabolicMuscleParameter Subscap4: provided_muscle_mass=0.02376
        Umberger2010MuscleMetabolicsProbe_MetabolicMuscleParameter Subscap5: provided_muscle_mass=0.01033
        Umberger2010MuscleMetabolicsProbe_MetabolicMuscleParameter Subscap6: provided_muscle_mass=0.01292
        Umberger2010MuscleMetabolicsProbe_MetabolicMuscleParameter Subscap7: provided_muscle_mass=0.01513
        Umberger2010MuscleMetabolicsProbe_MetabolicMuscleParameter Subscap8: provided_muscle_mass=0.00532
        Umberger2010MuscleMetabolicsProbe_MetabolicMuscleParameter Subscap9: provided_muscle_mass=0.0182
        Umberger2010MuscleMetabolicsProbe_MetabolicMuscleParameter Subscap10: provided_muscle_mass=0.00361
        Umberger2010MuscleMetabolicsProbe_MetabolicMuscleParameter Subscap11: provided_muscle_mass=0.00115
        Umberger2010MuscleMetabolicsProbe_MetabolicMuscleParameter LatDors1: provided_muscle_mass=0.01498
        Umberger2010MuscleMetabolicsProbe_MetabolicMuscleParameter LatDors2: provided_muscle_mass=0.02883
        Umberger2010MuscleMetabolicsProbe_MetabolicMuscleParameter LatDors3: provided_muscle_mass=0.04305
        Umberger2010MuscleMetabolicsProbe_MetabolicMuscleParameter LatDors4: provided_muscle_mass=0.03515
        Umberger2010MuscleMetabolicsProbe_MetabolicMuscleParameter LatDors5: provided_muscle_mass=0.03157
        Umberger2010MuscleMetabolicsProbe_MetabolicMuscleParameter LatDors6: provided_muscle_mass=0.04069
        Umberger2010MuscleMetabolicsProbe_MetabolicMuscleParameter PectMajT1: provided_muscle_mass=0.02692
        Umberger2010MuscleMetabolicsProbe_MetabolicMuscleParameter PectMajT2: provided_muscle_mass=0.02448
        Umberger2010MuscleMetabolicsProbe_MetabolicMuscleParameter PectMajT3: provided_muscle_mass=0.03475
        Umberger2010MuscleMetabolicsProbe_MetabolicMuscleParameter PectMajT4: provided_muscle_mass=0.03301
        Umberger2010MuscleMetabolicsProbe_MetabolicMuscleParameter PectMajT5: provided_muscle_mass=0.02273
        Umberger2010MuscleMetabolicsProbe_MetabolicMuscleParameter PectMajT6: provided_muscle_mass=0.03243
        Umberger2010MuscleMetabolicsProbe_MetabolicMuscleParameter PectMajC1: provided_muscle_mass=0.02769
        Umberger2010MuscleMetabolicsProbe_MetabolicMuscleParameter PectMajC2: provided_muscle_mass=0.01399
        Umberger2010MuscleMetabolicsProbe_MetabolicMuscleParameter BicLongProx: provided_muscle_mass=0.0662
        Umberger2010MuscleMetabolicsProbe_MetabolicMuscleParameter BicLongDist: provided_muscle_mass=0.0662
        Umberger2010MuscleMetabolicsProbe_MetabolicMuscleParameter BicLong: provided_muscle_mass=0.0662
        Umberger2010MuscleMetabolicsProbe_MetabolicMuscleParameter BicShort1: provided_muscle_mass=0.02079
        Umberger2010MuscleMetabolicsProbe_MetabolicMuscleParameter BicShort2: provided_muscle_mass=0.03107
        Umberger2010MuscleMetabolicsProbe_MetabolicMuscleParameter TriLong1: provided_muscle_mass=0.02697
        Umberger2010MuscleMetabolicsProbe_MetabolicMuscleParameter TriLong2: provided_muscle_mass=0.02955
        Umberger2010MuscleMetabolicsProbe_MetabolicMuscleParameter TriLong3: provided_muscle_mass=0.02964
        Umberger2010MuscleMetabolicsProbe_MetabolicMuscleParameter TriLong4: provided_muscle_mass=0.03203
        Umberger2010MuscleMetabolicsProbe_MetabolicMuscleParameter TriMed1: provided_muscle_mass=0.0184
        Umberger2010MuscleMetabolicsProbe_MetabolicMuscleParameter TriMed2: provided_muscle_mass=0.01765
        Umberger2010MuscleMetabolicsProbe_MetabolicMuscleParameter TriMed3: provided_muscle_mass=0.01195
        Umberger2010MuscleMetabolicsProbe_MetabolicMuscleParameter TriMed4: provided_muscle_mass=0.01395
        Umberger2010MuscleMetabolicsProbe_MetabolicMuscleParameter TriMed5: provided_muscle_mass=0.0077
        Umberger2010MuscleMetabolicsProbe_MetabolicMuscleParameter TriLat1: provided_muscle_mass=0.0125
        Umberger2010MuscleMetabolicsProbe_MetabolicMuscleParameter TriLat2: provided_muscle_mass=0.0332
        Umberger2010MuscleMetabolicsProbe_MetabolicMuscleParameter TriLat3: provided_muscle_mass=0.0152
        Umberger2010MuscleMetabolicsProbe_MetabolicMuscleParameter TriLat4: provided_muscle_mass=0.0162
        Umberger2010MuscleMetabolicsProbe_MetabolicMuscleParameter TriLat5: provided_muscle_mass=0.00585
        Umberger2010MuscleMetabolicsProbe_MetabolicMuscleParameter Brach1: provided_muscle_mass=0.0291
        Umberger2010MuscleMetabolicsProbe_MetabolicMuscleParameter Brach2: provided_muscle_mass=0.0159
        Umberger2010MuscleMetabolicsProbe_MetabolicMuscleParameter Brach3: provided_muscle_mass=0.01465
        Umberger2010MuscleMetabolicsProbe_MetabolicMuscleParameter Brach4: provided_muscle_mass=0.007
        Umberger2010MuscleMetabolicsProbe_MetabolicMuscleParameter Brach5: provided_muscle_mass=0.0066
        Umberger2010MuscleMetabolicsProbe_MetabolicMuscleParameter Brach6: provided_muscle_mass=0.0041
        Umberger2010MuscleMetabolicsProbe_MetabolicMuscleParameter Brach7: provided_muscle_mass=0.0065
        Umberger2010MuscleMetabolicsProbe_MetabolicMuscleParameter Anco1: provided_muscle_mass=0.00083
        Umberger2010MuscleMetabolicsProbe_MetabolicMuscleParameter Anco2: provided_muscle_mass=0.0015
        Umberger2010MuscleMetabolicsProbe_MetabolicMuscleParameter Anco3: provided_muscle_mass=0.0006
        Umberger2010MuscleMetabolicsProbe_MetabolicMuscleParameter Anco4: provided_muscle_mass=0.0022
        Umberger2010MuscleMetabolicsProbe_MetabolicMuscleParameter Anco5: provided_muscle_mass=0.00333
        Umberger2010MuscleMetabolicsProbe_MetabolicMuscleParameter Brachiorad1: provided_muscle_mass=0.0047
        Umberger2010MuscleMetabolicsProbe_MetabolicMuscleParameter Brachiorad2: provided_muscle_mass=0.014
        Umberger2010MuscleMetabolicsProbe_MetabolicMuscleParameter Brachiorad3: provided_muscle_mass=0.00597
        Umberger2010MuscleMetabolicsProbe_MetabolicMuscleParameter PronTerHum: provided_muscle_mass=0.0275
        Umberger2010MuscleMetabolicsProbe_MetabolicMuscleParameter PronTerUl: provided_muscle_mass=0.00433
        Umberger2010MuscleMetabolicsProbe_MetabolicMuscleParameter Supin1: provided_muscle_mass=0.00084
        Umberger2010MuscleMetabolicsProbe_MetabolicMuscleParameter Supin2: provided_muscle_mass=0.00364
        Umberger2010MuscleMetabolicsProbe_MetabolicMuscleParameter Supin3: provided_muscle_mass=0.00336
        Umberger2010MuscleMetabolicsProbe_MetabolicMuscleParameter Supin4: provided_muscle_mass=0.00296
        Umberger2010MuscleMetabolicsProbe_MetabolicMuscleParameter Supin5: provided_muscle_mass=0.00676
        Umberger2010MuscleMetabolicsProbe_MetabolicMuscleParameter PronQuad1: provided_muscle_mass=0.00163
        Umberger2010MuscleMetabolicsProbe_MetabolicMuscleParameter PronQuad2: provided_muscle_mass=0.00347
        Umberger2010MuscleMetabolicsProbe_MetabolicMuscleParameter PronQuad3: provided_muscle_mass=0.00493
